# Константа связи
α := 0.7
# Трансфер-матрица
M(k, Φ) := e^(-1i*π*(k + Φ))/(2*k*(-1 + e^(2*1i*π*k))*(1 + e^(2*1i*π*Φ)))*[
    -(2*k*e^(2*1i*π*k) + 2*k*e^(2*1i*π*(k + 2*Φ)) - 1i*α*e^(2*1i*π*(k + Φ)) + (-4*k + 1i*α)*e^(2*1i*π*(2*k + Φ))), -2*k*(-1 + e^(2*1i*π*Φ))*(-1 + e^(2*1i*π*(k + Φ))) - 1i*α*e^(2*1i*π*Φ)*(-1 + e^(2*1i*π*k));
    2*k*e^(4*1i*π*k) + 2*k*e^(2*1i*π*(k + 2*Φ)) + (-2*k + 1i*α)*e^(2*1i*π*(2*k + Φ)) - (2*k + 1i*α)*e^(2*1i*π*(k + Φ)), 2*k*e^(2*1i*π*k) + 2*k*e^(2*1i*π*(k + 2*Φ)) + 1i*α*e^(2*1i*π*(k + Φ)) - (4*k + 1i*α)*e^(2*1i*π*Φ)
]
M(k, 0) → [
    -e^(-π*k*1i)*(4*k*e^(2i*π*k) - 0.7i*e^(6.28318530718i*k) - e^(4i*π*k)*(4*k - 0.7i))/(4*k*(e^(2i*π*k) - 1)), e^(-π*k*1i)*(0.7i - 0.7i*e^(6.28318530718i*k))/(4*k*(e^(2i*π*k) - 1));
    -e^(-π*k*1i)*(-2*k*e^(2i*π*k) - 2*k*e^(4i*π*k) + e^(2i*π*k)*(2*k + 0.7i) + e^(4i*π*k)*(2*k - 0.7i))/(4*k*(e^(2i*π*k) - 1)), e^(-π*k*1i)*(0.7i*e^(6.28318530718i*k) - 4*k + 4*k*e^(6.28318530718i*k) - 0.7i)/(4*k*(e^(2i*π*k) - 1))
]
f(k, Φ) := |1 - |M(k, Φ)||
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# Видно, что при полуцелых значения магнитного потока Φ определитель трансфер-матрицы устремляется в бесконечность, в то время как при остальных значениях он равен единице
eig1(k, Φ) := eigenvals(M(k, Φ))[0]
eig2(k, Φ) := eigenvals(M(k, Φ))[1]
t := 0, 0.001 .. 2
# Поведение собственного числа №1 | Поведение собственного числа №2
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# Отклонение модулей собственных чисел от единицы
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t := 0.5, 0.5 + 0.001 .. 0.9
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# Модуль следа трансфер-матрицы. Значения k, для которых он попадает в интервал от 0 до 2 включительно, принадлежат непрерывному спектру.
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# Проверяем правильность выражения для следа
traceM(k, Φ) := e^(1i*π*(-k + Φ))*(4*k + 1i*α + (4*k - 1i*α)*e^(2*1i*π*k))/(2*k*(1 + e^(2*1i*π*Φ)))
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## Проверка упрощенных выражений для элементов трансфер-матрицы в магнитном поле
m11(k, Φ) := M(k, Φ)[:, 0][0]
mm11(k, Φ) := e^(1i*π*k)/cos(π*Φ)*(1 + α/(4*1i*k) + (1 - cos(2*π*Φ))/(e^(1i*2*π*k) - 1))
Φ := 0.1
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m12(k, Φ) := M(k, Φ)[:, 1][0]
mm12(k, Φ) := e^(-1i*π*k)/cos(π*Φ)*(α/(4*1i*k) + sin(π*Φ)*sin(π*(k + Φ))/(1i*sin(π*k)))
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## Собственные вектора трансфер-матрицы
λ1(k, Φ) := 1/cos(π*Φ)*(cos(π*k) + α/(4*k)*sin(π*k)) + sqrt((1/cos(π*Φ)*(cos(π*k) + α/(4*k)*sin(π*k)))^2 - 1)
λ2(k, Φ) := 1/cos(π*Φ)*(cos(π*k) + α/(4*k)*sin(π*k)) - sqrt((1/cos(π*Φ)*(cos(π*k) + α/(4*k)*sin(π*k)))^2 - 1)
normv(X) := X/|X|
X1(k, Φ) := normv([mm12(k, Φ); λ1(k, Φ) - mm11(k, Φ)])
X2(k, Φ) := normv([mm12(k, Φ); λ2(k, Φ) - mm11(k, Φ)])
# Преобразованные выражения для собственных векторов
XX1(k, Φ) := normv([
    -1i*(cos(π*k) - 1i*sin(π*k))*(α/(4*k) + sin(π*Φ)*sin(π*k + π*Φ)/sin(π*k));
    1i*(α/(4*k)*cos(π*k) - sin(π*k) + sin(π*Φ)^2/sin(π*k)) + cos(π*Φ)*sqrt((1/cos(π*Φ)*(cos(π*k) + α/(4*k)*sin(π*k)))^2 - 1)
])
XX2(k, Φ) := normv([
    -1i*(cos(π*k) - 1i*sin(π*k))*(α/(4*k) + sin(π*Φ)*sin(π*k + π*Φ)/sin(π*k));
    1i*(α/(4*k)*cos(π*k) - sin(π*k) + sin(π*Φ)^2/sin(π*k)) - cos(π*Φ)*sqrt((1/cos(π*Φ)*(cos(π*k) + α/(4*k)*sin(π*k)))^2 - 1)
])
# Далее используем пребразованные выражения
X1(k, Φ) := XX1(k, Φ)
X2(k, Φ) := XX2(k, Φ)
k := 0.5
Φ := 0.1
X1(k, Φ) = [-0.999508; -0.0313501i]
X2(k, Φ) = [-0.338681; -0.940901i]
tr(M(k, Φ)) = 0.736024
checkEigens(M, X, λ) := |M*X - λ*X|
eigenvecs(M(k, Φ)) = [0.999508, -0.338681i; 0.0313501i, 0.940901]
|M(k, Φ)| = 1
eigenvals(M(k, Φ)) = [0.368012 + 0.929821i; 0.368012 - 0.929821i]
M(k, Φ)*eigenvecs(M(k, Φ))[:, 0] = [0.367831 + 0.929364i; -0.02915 + 0.0115372i]
M(k, Φ)*X1(k, Φ) = [-0.367831 - 0.929364i; 0.02915 - 0.0115372i]
eigenvals(M(k, Φ))[0]*eigenvecs(M(k, Φ))[:, 0] = [0.367831 + 0.929364i; -0.02915 + 0.0115372i]
λ1(k, Φ) = 0.368012 + 0.929821i
(M(k, Φ)*X1(k, Φ))*X1(k, Φ)/|X1(k, Φ)|^2 = 0.368012 + 0.929821i
checkEigens(M(k, Φ), eigenvecs(M(k, Φ))[:, 0], eigenvals(M(k, Φ))[0]) = 1.11036e-16
checkEigens(M(k, Φ), eigenvecs(M(k, Φ))[:, 1], eigenvals(M(k, Φ))[1]) = 2.32634e-16
checkEigens(M(k, Φ), X1(k, Φ), λ1(k, Φ)) = 7.48324e-16
checkEigens(M(k, Φ), X2(k, Φ), λ2(k, Φ)) = 1.84632e-16
# Особыми являются целые значения k и полуцелые значения Φ
Φ := 1
t := 0.1, 0.1 + 0.001 .. 0.9
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t := 0.1, 0.1 + 0.001 .. 0.49
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t := 0.1, 0.1 + 0.001 .. 0.49
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t := 0.51, 0.51 + 0.001 .. 1.49
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t := 0.51, 0.51 + 0.001 .. 1.49
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# Собственные числа и лакуны непрерывного спектра
d(k, Φ) := 1/cos(π*Φ)*(cos(π*k) + α/(4*k)*sin(π*k))
isContSpectra(k, Φ) := |1/cos(π*Φ)*(cos(π*k) + α/(4*k)*sin(π*k))| ≤ 1
t := 0.51, 0.51 + 0.001 .. 1.49
t := 0.1, 0.1 + 0.001 .. 3
Φ := 1.2
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Mc(k, Φ, t) := e^(-1i*π*(k + Φ))*(e^(2*π*1i*k) - 1)^-1*(e^(2*1i*k*(t + π)) - e^(2*1i*(k*t + π*Φ)) + e^(2*π*1i*(k + Φ)) - 1)^-1*[
    e^(2*π*1i*k)*(e^(2*π*1i*k) - 1)*(-α*1i/(2*k)*e^(2*1i*π*Φ)*(e^(2*π*1i*k) - 1) + 2*e^(2*π*1i*(k + Φ)) - e^(4*1i*π*Φ) - 1), -α*1i/(2*k)*e^(2*1i*π*Φ)*(e^(2*π*1i*k) - 1)*(e^(2*π*1i*k) - e^(2*1i*k*t)) + (e^(2*π*1i*(k + Φ)) - 1)*(e^(2*1i*(k*t + π*Φ)) - e^(2*1i*π*(k + Φ)) + e^(2*π*1i*k) - 1);
    e^(2*π*1i*k)*(α*1i/(2*k)*e^(2*1i*π*Φ)*(e^(2*π*1i*k) - 1)*(e^(2*π*1i*k) - e^(2*1i*k*t)) + (e^(2*π*1i*k) - e^(2*1i*π*Φ))*(e^(2*1i*k*t)*(e^(2*π*1i*k) + e^(2*1i*π*Φ) - 1) - e^(2*π*1i*(k + Φ)))), α*1i/(2*k)*e^(2*1i*π*Φ)*(e^(2*π*1i*k) - 1)*(e^(2*π*1i*k) - e^(2*1i*k*t)) + e^(2*1i*π*Φ)*((e^(2*π*1i*(k + Φ)) - 1)*(e^(2*π*1i*k) - e^(2*1i*k*t)) - e^(2*1i*k*t)*(e^(2*π*1i*k) - 1)) + e^(2*1i*k*(t + π))*(e^(2*π*1i*k) - 1)
]
Mc(k, Φ, 0) = [-0.432624 - 0.809017i, 1.02041; -0.155161, -0.432624 + 0.809017i]
M(k, Φ) = [-0.432624 - 0.809017i, 1.02041; -0.155161, -0.432624 + 0.809017i]
dif(k, Φ, θ) := norme(Mc(k, Φ, θ) - M(k, Φ))
ar(a, b, delta) := a, a + delta .. b
t := ar(0.1, 0.49, 0.001)
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t := ar(0.51, 0.9, 0.001)
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t := ar(1.1, 1.49, 0.001)
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t := ar(1.51, 1.9, 0.001)
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merge(a, b) := [a[0], b[0]; a[1], b[1]]
det(a, b) := |merge(a, b)|
det([1; 2], [3; 4]) = -2
f1(k, Φ, t) := det(X1(k, Φ), Mc(k, Φ, t)*X1(k, Φ))
f2(k, Φ, t) := det(X2(k, Φ), Mc(k, Φ, t)*X2(k, Φ))
θ := 0.1
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